*Heading
 Cantilever beam tutorial
** Job name: Deform Model name: Model-1
** Generated by: Abaqus/CAE Student Edition 6.14-2
*Preprint, echo=NO, model=NO, history=NO, contact=NO
**
** PARTS
**
*Part, name=Part-1
*End Part
**
**
** ASSEMBLY
**
*Assembly, name=Assembly
**
*Instance, name=Part-1-1, part=Part-1
*Node
      1,       -51.25,         -10.,          25.
      2,       -51.25,           0.,          25.
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*Element, type=C3D8
  1,  13,  14,  17,  16,   1,   2,   5,   4
  2,  14,  15,  18,  17,   2,   3,   6,   5
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*Nset, nset=Set-1, generate
   1,  252,    1
*Elset, elset=Set-1, generate
   1,  120,    1
** Section: BeamSection
*Solid Section, elset=Set-1, material=Steel
1.,
*End Instance
**
*Nset, nset=Set-1, instance=Part-1-1, generate
  1,  12,   1
*Elset, elset=Set-1, instance=Part-1-1, generate
 1,  6,  1
*Elset, elset=_Surf-1_S4, internal, instance=Part-1-1, generate
   2,  120,    2
*Surface, type=ELEMENT, name=Surf-1
_Surf-1_S4, S4
*End Assembly
**
** MATERIALS
**
*Material, name=Steel
*Elastic
 2e+11, 0.3
**
** BOUNDARY CONDITIONS
**
** Name: Fixed Type: Symmetry/Antisymmetry/Encastre
*Boundary
Set-1, ENCASTRE
** ----------------------------------------------------------------
**
** STEP: Step-1
**
*Step, name=Step-1, nlgeom=NO
Load the top of the beam
*Static
1., 1., 1e-05, 1.
**
** LOADS
**
** Name: Pressure   Type: Pressure
*Dsload
Surf-1, P, 500000.
**
** OUTPUT REQUESTS
**
*Restart, write, frequency=0
**
** FIELD OUTPUT: F-Output-1
**
*Output, field, variable=PRESELECT
**
** HISTORY OUTPUT: H-Output-1
**
*Output, history, variable=PRESELECT
*End Step
