*Heading
 Hinge Tutorial
** Job name: PullHinge Model name: Model-1
** Generated by: Abaqus/CAE Student Edition 6.14-2
*Preprint, echo=NO, model=NO, history=NO, contact=NO
**
** PARTS
**
*Part, name=Hinge-hole
*End Part
**
*Part, name=Hinge-solid
*End Part
**
*Part, name=Pin
*End Part
**
**
** ASSEMBLY
**
*Assembly, name=Assembly
**
*Instance, name=Hinge-hole-1, part=Hinge-hole
*Node
      1, 0.00499999989, -0.0237499997, 0.0399999991
      2, 0.0250000004, -0.0237499997, 0.0399999991
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*Element, type=C3D8R
 1, 146, 147,  28,  27, 372, 373, 181, 182
 2, 147, 145,  29,  28, 373, 371, 180, 181
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*Nset, nset=Set-1, generate
   1,  503,    1
*Elset, elset=Set-1, generate
   1,  303,    1
** Section: SolidSection
*Solid Section, elset=Set-1, material=Steel
1.,
*End Instance
**
*Instance, name=Hinge-solid-1, part=Hinge-solid
        0.05,  6.93889390390723e-18,         0.04
        0.05,  6.93889390390723e-18,         0.04,         0.05,           1., 0.0399999999999999,         180.
*Node
      1, 0.00499999989, -0.0237499997, 0.0399999991
      2, 0.0250000004, -0.0237499997, 0.0399999991
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*Element, type=C3D8R
 1, 101,  96,  24,  25, 205, 200, 127, 128
 2, 101,  36,  35,  96, 205, 138, 137, 200
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*Nset, nset=Set-1, generate
   1,  246,    1
*Elset, elset=Set-1, generate
   1,  128,    1
** Section: SolidSection
*Solid Section, elset=Set-1, material=Steel
1.,
*End Instance
**
*Instance, name=Pin-1, part=Pin
       0.025, -0.00374999999999999,         0.02
       0.025, -0.00374999999999999,         0.02,        1.025, -0.00374999999999999, 0.0200000000000001,          90.
*Node
      1, 0.0120000001, 0.0299999993,           0.
*Nset, nset=Pin-1-RefPt_, internal
1,
*Surface, type=REVOLUTION, name=CP-4-Pin-1
START,        0.012,         0.03
 LINE,        0.012,        -0.03
*Rigid Body, ref node=Pin-1-RefPt_, analytical surface=CP-4-Pin-1
*End Instance
**
*Nset, nset=Monitor, instance=Hinge-solid-1
 12,
*Nset, nset=Set-2, instance=Hinge-hole-1
  15,  16,  17,  18,  95,  96
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*Elset, elset=Set-2, instance=Hinge-hole-1, generate
 197,  231,    1
*Nset, nset=Set-3, instance=Pin-1
 1,
*Nset, nset=Set-4, instance=Hinge-solid-1
 12,
*Elset, elset=_CP-2-Hinge-hole-1_S4, internal, instance=Hinge-hole-1
 244, 267, 280, 303
*Elset, elset=_CP-2-Hinge-hole-1_S5, internal, instance=Hinge-hole-1
 245, 246, 247, 261, 281, 282, 283, 297
*Elset, elset=_CP-2-Hinge-hole-1_S2, internal, instance=Hinge-hole-1, generate
 43,  56,   1
*Surface, type=ELEMENT, name=CP-2-Hinge-hole-1
_CP-2-Hinge-hole-1_S4, S4
_CP-2-Hinge-hole-1_S5, S5
_CP-2-Hinge-hole-1_S2, S2
*Elset, elset=_CP-2-Hinge-solid-1_S2, internal, instance=Hinge-solid-1, generate
 25,  48,   1
*Surface, type=ELEMENT, name=CP-2-Hinge-solid-1
_CP-2-Hinge-solid-1_S2, S2
*Elset, elset=_CP-4-Hinge-hole-1_S1, internal, instance=Hinge-hole-1, generate
 232,  267,    1
*Elset, elset=_CP-4-Hinge-hole-1_S5, internal, instance=Hinge-hole-1
  1,  2, 12, 15, 16, 26, 29, 30, 40, 43, 44, 54
*Elset, elset=_CP-4-Hinge-hole-1_S4, internal, instance=Hinge-hole-1
  8,  9, 11, 22, 23, 25, 36, 37, 39, 50, 51, 53
*Surface, type=ELEMENT, name=CP-4-Hinge-hole-1
_CP-4-Hinge-hole-1_S1, S1
_CP-4-Hinge-hole-1_S5, S5
_CP-4-Hinge-hole-1_S4, S4
*Elset, elset=_CP-5-Hinge-solid-1_S5, internal, instance=Hinge-solid-1
  1,  8, 25, 32
*Elset, elset=_CP-5-Hinge-solid-1_S4, internal, instance=Hinge-solid-1
  5,  7, 12, 18, 20, 22, 24, 29, 31, 36, 42, 44, 46, 48
*Elset, elset=_CP-5-Hinge-solid-1_S6, internal, instance=Hinge-solid-1
 13, 15, 37, 39
*Surface, type=ELEMENT, name=CP-5-Hinge-solid-1
_CP-5-Hinge-solid-1_S5, S5
_CP-5-Hinge-solid-1_S4, S4
_CP-5-Hinge-solid-1_S6, S6
*Elset, elset=_Flange-h_S4, internal, instance=Hinge-hole-1
 244, 267, 280, 303
*Elset, elset=_Flange-h_S5, internal, instance=Hinge-hole-1
 245, 246, 247, 261, 281, 282, 283, 297
*Elset, elset=_Flange-h_S2, internal, instance=Hinge-hole-1, generate
 43,  56,   1
*Surface, type=ELEMENT, name=Flange-h
_Flange-h_S4, S4
_Flange-h_S5, S5
_Flange-h_S2, S2
*Elset, elset=_Flange-s_S2, internal, instance=Hinge-solid-1, generate
 25,  48,   1
*Surface, type=ELEMENT, name=Flange-s
_Flange-s_S2, S2
*Elset, elset=_Inside-h_S1, internal, instance=Hinge-hole-1, generate
 232,  267,    1
*Elset, elset=_Inside-h_S5, internal, instance=Hinge-hole-1
  1,  2, 12, 15, 16, 26, 29, 30, 40, 43, 44, 54
*Elset, elset=_Inside-h_S4, internal, instance=Hinge-hole-1
  8,  9, 11, 22, 23, 25, 36, 37, 39, 50, 51, 53
*Surface, type=ELEMENT, name=Inside-h
_Inside-h_S1, S1
_Inside-h_S5, S5
_Inside-h_S4, S4
*Elset, elset=_Inside-s_S5, internal, instance=Hinge-solid-1
  1,  8, 25, 32
*Elset, elset=_Inside-s_S4, internal, instance=Hinge-solid-1
  5,  7, 12, 18, 20, 22, 24, 29, 31, 36, 42, 44, 46, 48
*Elset, elset=_Inside-s_S6, internal, instance=Hinge-solid-1
 13, 15, 37, 39
*Surface, type=ELEMENT, name=Inside-s
_Inside-s_S5, S5
_Inside-s_S4, S4
_Inside-s_S6, S6
*Elset, elset=_Surf-12_S2, internal, instance=Hinge-solid-1, generate
 113,  128,    1
*Surface, type=ELEMENT, name=Surf-12
_Surf-12_S2, S2
*End Assembly
**
** MATERIALS
**
*Material, name=Steel
*Elastic
 2.09e+11, 0.3
**
** INTERACTION PROPERTIES
**
*Surface Interaction, name=NoFric
1.,
*Friction
0.,
**
** BOUNDARY CONDITIONS
**
** Name: Constrain Type: Displacement/Rotation
*Boundary
Set-4, 1, 1
Set-4, 2, 2
Set-4, 3, 3
** Name: Fixed Type: Displacement/Rotation
*Boundary
Set-2, 1, 1
Set-2, 2, 2
Set-2, 3, 3
** Name: NoSlip Type: Displacement/Rotation
*Boundary
Set-3, 1, 1
Set-3, 2, 2
Set-3, 3, 3
Set-3, 4, 4
Set-3, 5, 5
Set-3, 6, 6
**
** INTERACTIONS
**
** Interaction: Flanges
*Contact Pair, interaction=NoFric
CP-2-Hinge-solid-1, CP-2-Hinge-hole-1
** Interaction: HinePin-hole
*Contact Pair, interaction=NoFric
Inside-h, Pin-1.CP-4-Pin-1
** Interaction: HingePin-Solid
*Contact Pair, interaction=NoFric
Pin-1.CP-4-Pin-1, CP-5-Hinge-solid-1
** Interaction: HingePin-hole
*Contact Pair, interaction=NoFric
CP-4-Hinge-hole-1, Pin-1.CP-4-Pin-1
** Interaction: HingePin_Solid
*Contact Pair, interaction=NoFric
Inside-s, Pin-1.CP-4-Pin-1
** Interaction: flanges1
*Contact Pair, interaction=NoFric
Flange-s, Flange-h
** ----------------------------------------------------------------
**
** STEP: Load
**
*Step, name=Load, nlgeom=NO
Apply load
*Static
0.1, 1., 1e-05, 1.
**
** BOUNDARY CONDITIONS
**
** Name: Constrain Type: Displacement/Rotation
*Boundary, op=NEW
Set-4, 2, 2
Set-4, 3, 3
** Name: Fixed Type: Displacement/Rotation
*Boundary, op=NEW
Set-2, 1, 1
Set-2, 2, 2
Set-2, 3, 3
** Name: NoSlip Type: Displacement/Rotation
*Boundary, op=NEW
Set-3, 2, 2
Set-3, 3, 3
Set-3, 4, 4
Set-3, 6, 6
**
** LOADS
**
** Name: Pressure   Type: Pressure
*Dsload
Surf-12, P, -1e+06
**
** OUTPUT REQUESTS
**
*Restart, write, frequency=0
*Monitor, dof=1, node=Monitor, frequency=1
**
** FIELD OUTPUT: F-Output-1
**
*Output, field
*Node Output, exterior
CF, RF, U
*Element Output, exterior, directions=YES
LE, PE, PEEQ, PEMAG, S
*Contact Output
CSTRESS,
*Output, history, frequency=0
*End Step
** ----------------------------------------------------------------
**
** STEP: Contact
**
*Step, name=Contact, nlgeom=NO
Establish contact
*Static
0.1, 1., 1e-05, 1.
**
** OUTPUT REQUESTS
**
*Restart, write, frequency=0
**
** FIELD OUTPUT: F-Output-1
**
*Output, field
*Node Output, exterior
CF, RF, U
*Element Output, exterior, directions=YES
LE, PE, PEEQ, PEMAG, S
*Contact Output
CSTRESS,
**
** HISTORY OUTPUT: H-Output-1
**
*Output, history, variable=PRESELECT
*End Step
